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/batch
! ANSYS input file written by Workbench version 2022 R2
! File used for geometry attach: H:\My Drive\Master's_Semister-I\Ansys(SES)\Assignments\Thesis\Modeling Solid Edge\Wings .igs
/title,end--Static Structural (A5)
/COM,/COM,     ANSYSMotion, 2022.2
/com,--- Data in consistent MKS units. See Solving Units in the help system for more information.
/units,MKS
/prep7
! Turn off shape checking because checks already performed inside WB mesher.
! See help system for more information.
SHPP,OFF,,NOWARN
etcon,set             ! allow ANSYS to choose best KEYOP's for 180x elements, resets any applicable keyopt to MAPDL defaults
/com,*********** Nodes for the whole assembly ***********
nblock,3,,3562
(1i9,3e20.9e3)
        1     8.682847532E-02     1.000000000E-02    -1.894729117E-08
        2    -1.140487785E-02     1.000000000E-02     3.170018230E-03
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-1
/com,*********** Elements for Body 1 "Wings -FreeParts" ***********
et,1,187
eblock,19,solid,,1656
(19i9)
        1        1        1        1        0        0        0        0       10        0        1       72      526      286      519     1043     2341     1039     1042
     3199     2340
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-1
/com,*********** Send User Defined Coordinate System(s) ***********
csys,0
toffst,273.15,  ! Temperature offset from absolute zero
/com,*********** Set Reference Temperature ***********
tref,22.
/com,*********** Send Materials ***********
Temperature = 'TEMP' ! Temperature
MP,DENS,1,4620,	! kg m^-3
MP,ALPX,1,9.4e-06,	! C^-1
MP,C,1,522,	! J kg^-1 C^-1
MP,KXX,1,21.9,	! W m^-1 C^-1
MP,RSVX,1,1.7e-06,	! kg m^3 A^-2 s^-3
MP,EX,1,96000000000,	! Pa
MP,NUXY,1,0.36,
MP,MURX,1,1,

!************************* Model Summary ********************
!Wings -FreeParts,	Titanium Alloy,	matid,	1
!************************* End Model Summary ********************
CMBLOCK,_CM66_FIXEDSU,NODE,      115
(8i10)
         1        16        19        20        21        22        23        24
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CMBLOCK,_CM68_FIXEDSU,NODE,      102
(8i10)
         9        51        52        53        54        55        56        57
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CMBLOCK,_CM70_FIXEDSU,NODE,       91
(8i10)
         2         9        10        11        12        13        14        15
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CMBLOCK,_CM72_FIXEDSU,NODE,      147
(8i10)
         1         2         3         4         5         6         7         8
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CMBLOCK,_CM74_FIXEDSU,NODE,       33
(8i10)
         9        16        17        18        51        52        53       190
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/com,*********** Fixed Supports ***********
CMBLOCK,_FIXEDSU,NODE,      400
(8i10)
         1         2         3         4         5         6         7         8
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
cmsel,s,_FIXEDSU
d,all,all
nsel,all
/com,*********** Define Pressure Vector Using Surface Effect Elements ***********
local,12,0,0.,0.,0.,0.,0.,0.
csys,0
et,2,154
eblock,10,,,78
(15i9)
     2565        2        2        2       12      135      447      449      449     1462     2964      449     1463
     2566        2        2        2       12      106      107      451      451     1266     1284      451     1273
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-1
esel,s,type,,2
keyop,2,2,1                ! Apply load in local coordinate system
keyop,2,7,0                ! Use deformed area for application of load
esel,all
/com,*********** Define Pressure Vector Using Surface Effect Elements ***********
local,13,0,0.,0.,0.,0.,0.,0.
csys,0
et,3,154
eblock,10,,,129
(15i9)
     2643        3        3        3       13       75      201      425      425     1057     1917      425     1061
     2644        3        3        3       13      422      423      445      445     2860     2867      445     2861
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-1
esel,s,type,,3
keyop,3,2,1                ! Apply load in local coordinate system
keyop,3,7,0                ! Use deformed area for application of load
esel,all
fini
/com,****************************************************************************
/com,*************************    SOLUTION       ********************************
/com,****************************************************************************
/solu
antype,0                   ! static analysis
nlgeom,on                  ! Turn on Large Deformation Effects
_thickRatio=  0     ! Ratio of thick parts in the model
eqsl,sparse,,,,,1
cntr,print,1               ! print out contact info and also make no initial contact an error
nldiag,cont,iter           ! print out contact info each equilibrium iteration
rescontrol,define,last           ! Turn on restart files due to future eigen analysis intent
/com,****************************************************
/com,******************* SOLVE FOR LS 1 OF 1 ****************
esel,s,type,,2
nsle
sfe,all,1,pres,1,0.
sfe,all,2,pres,1,0.
sfe,all,3,pres,1,0.1
esel,s,type,,3
nsle
sfe,all,1,pres,1,0.
sfe,all,2,pres,1,0.
sfe,all,3,pres,1,0.1
nsel,all
esel,all
autots,on                  ! Workbench Program Controlled automatic time stepping
nsub,1,10,1                ! due to presence of general nonlinear
time,1.
outres,erase
outres,all,none
outres,nsol,all,
outres,rsol,all
outres,eangl,all
outres,etmp,all
outres,veng,all
outres,strs,all,
outres,epel,all,
outres,eppl,all,
outres,cont,all,
! *********** WB SOLVE COMMAND ***********
! check interactive state
*get,ANSINTER_,active,,int
*if,ANSINTER_,ne,0,then
/eof
*endif
solve
/com *************** Write FE CONNECTORS *********
CEWRITE,file,ce,,INTE
/com,****************************************************
/com,*************** FINISHED SOLVE FOR LS 1 *************
*get,_NSOLTHREADS,active,0,ntfs
*get,_NSOLPROCESSES,active,0,npfs
/post1
fini
